echo               both
dimension          3
units              si
atom_style       hybrid bond meso
boundary          p f p

# create simulation box
#2D box
include           3d-vars.lmp
read_data         poly.txt

# create wall particles
variable          ub equal ${Lx}+2.5*${dx}
variable          lb equal -2.0*${dx}
variable          hdx equal 0.5*${dx}
variable          hLx equal ${Lx}+0.5*${dx}
variable          lLx equal ${Lx}-0.5*${dx}
region            fluid block 0.0 ${Lx} ${dx} ${lLx} 0.0 ${Lx} units box
region            uwall block 0.0 ${Lx} ${Lx} ${ub} 0.0 ${Lx} units box
region            lwall block 0.0 ${Lx} ${lb} 0.0 0.0 ${Lx} units box
lattice            sc ${dx}
create_atoms       2 region uwall
create_atoms       2 region lwall

# create fluid particles
bond_style      fene
special_bonds   lj 1 1 1
bond_coeff  1 ${H} ${r0} 0.0 0.0


group              uwall region uwall
group              lwall region lwall
group              fluid region fluid
#group              integrate_fulll union fluid lwall

mass               1 ${sdpd_mass}
mass               2 ${sdpd_mass}
set                group all meso_rho ${sdpd_rho}

# use Tait's EOS in combination with Morris' laminar viscosity.
# We set rho_0 = 1000 kg/m^3, c = 0.1 m/s, h = 6.5e-5 m.
# The dynamic viscosity is set to 1.0e-3 Pa s, corresponding to a kinematic viscosity of 1.0e-6 m^2/s
#The temperature is set to .
pair_style         hybrid/overlay sph/rhosum 1 sdpd
variable           sdpd_temp index 1e9
pair_coeff         * * sph/rhosum   ${h}
pair_coeff         * *    sdpd ${sdpd_rho} ${sdpd_c} ${sdpd_eta} ${h} ${sdpd_temp}

compute            rho_peratom fluid meso_rho/atom
compute            e_peratom fluid meso_e/atom
compute            ke_peratom fluid ke/atom
compute            esph fluid reduce sum c_e_peratom
compute            ke fluid ke
compute            sdpd_kin fluid temp
variable           etot equal c_ke+c_esph


# do full time integration for shear driver and fluid, but keep walls stationary
variable           velwall    equal 1e-5
variable           negvelwall    equal -1*${velwall}
fix                integrate_fix_full all meso
velocity           uwall set ${velwall} 0.0 0.0 units box
velocity           lwall set ${negvelwall} 0.0 0.0 units box
fix                freeze_fixu uwall setforce 0.0 0.0 0.0
fix                freeze_fixl lwall setforce 0.0 0.0 0.0


dump               dump_all all custom 10000 dump*.dat x y vx vy id type c_rho_peratom
dump_modify        dump_all first yes
dump_modify        dump_all sort id
dump_modify        dump_all pad 8
dump               dump_fluid fluid custom 10000 dumpfluid*.dat x y vx vy id type c_rho_peratom
dump_modify        dump_fluid first yes
dump_modify        dump_fluid sort id
dump_modify        dump_fluid pad 8

thermo             10
thermo_style       custom step  c_sdpd_kin
thermo_modify      norm no

dump imgDump all image 1000 image.*.jpg type type atom yes bond atom 5e-6 adiam 1e-5 view 60 60 zoom 1.3  box yes 0.01
dump_modify        imgDump pad 9
dump imgDump2 all image 1000 image2.*.jpg type type atom yes bond atom 5e-6 adiam 1e-5 view 60 30 zoom 1.3  box yes 0.01
dump_modify        imgDump2 pad 9


neighbor           1.0e-6 bin
include            settimestep.lmp
timestep           ${dt}
run                10000000
