clear

echo               both
dimension          ${ndim}
units              si
atom_style   hybrid  bond meso

# create simulation box
include            ${ndim}-model.lmp

# create fluid particles
include            ${ndim}-lattice.lmp
create_atoms       1 region box
mass               *  ${sdpd_mass}

write_restart      poly3d.restart
